** ----------------------------------------------------------------
**
** STEP: Step-2
**
*Step, name=Step-2, inc=1000000
*Heat Transfer, end=PERIOD
1., 300., , ,
**
** INTERACTIONS
**
** Interaction: Int-1
*Boundary, amplitude=Amp-1
NSet-fix, 11, 11, 0.0
**
** OUTPUT REQUESTS
**
*Restart, write, frequency=0
*Output, field, variable=PRESELECT
*Output, history, frequency=0
*End Step
