************
** PARTS (Nodes)
************
*Node
1, 0, 0, 0
2, 1, 0, 0
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************
** PARTS (Elements)
************
*Element, type=DCC3D8
1, 5, 6, 7, 8, 1, 2, 3, 4
2, 6, 27, 36, 7, 2, 9, 18, 3
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************
** PARTS (Element sets & Node sets)
************
*Elset, elset=ELSet-1, generate
1, 160, 1
*Elset, elset=ig002
2
*Nset, nset=NSet-1, elset=ELSet-1
,
*Nset, nset=NSet-fix
1, 4, 5, 8, 17, 26
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************
** PARTS (sections)
************
*Solid Section, elset=ELSet-1, material=Material-1
************
** MATERIAL
************
*Material, name=Material-1
*Conductivity
270.00, 270.00,
*Density
2700.00, 2700.00,
*Specific Heat
1.00,
************
** Assigning Material
************
************
** Surface
************
*Elset, elset=_Surf-1_S4, generate
5, 125, 5
*Surface, type=ELEMENT, name=Surf-1
_Surf-1_S4, S4
************
** Table/Amplitude
************
*Amplitude, name=Amp-1, time=TOTALTIME
 0.00, 10.00,  2000.00, 10.00,
************
** INITIAL CONDITION
************
*Initial Conditions, type=TEMPERATURE
NSet-1, 10.000000
**----------------------------------------------------------------
**
**STEP:Step-2
**
*Step, name=Step-2, inc=1000000
*Heat Transfer, end=PERIOD
1., 300., , ,
**
**INTERACTIONS
**
**Interaction:Int-1
*Boundary, amplitude=Amp-1
NSet-fix, 11, 11, 0.0
**
**OUTPUT REQUESTS
**
*Restart, write, frequency=0
*Output ,field ,variable=PRESELECT
*Output ,history ,frequency=0
*End Step
